# OpenSim document version 20302
MarkerSet gait2354_Scale:
  Marker C7: torso (-0.085 0.435 0.00165426)
  Marker R_ACROMION: torso (-0.003 0.425 0.13)
  Marker L_ACROMION: torso (-0.003 0.425 -0.13)
  Marker R_HUM_PROX: humerus_r (0 -0.05 0.02)
  Marker R_HUM_ANT: humerus_r (0.03 -0.13 0.02)
  Marker R_ELBOW_LAT: humerus_r (0.015 -0.28 0.04)
  Marker R_ELBOW_MED: humerus_r (0.00225 -0.286 -0.046)
  Marker R_WIRST_LAT: radius_r (0.0005 -0.225 0.05)
  Marker R_WRITS_MED: radius_r (-0.022 -0.225 -0.022)
  Marker L_HUM_PROX: humerus_l (0 -0.05 -0.02)
  Marker L_HUM_ANT: humerus_l (0.03 -0.13 -0.02)
  Marker L_ELBOW_LAT: humerus_l (0.015 -0.28 -0.04)
  Marker L_ELBOW_MED: humerus_l (0.00225005 -0.286 0.046)
  Marker L_WRIST_LAT: radius_l (0.0005 -0.225 -0.05)
  Marker L_WIRST_MED: radius_l (-0.022 -0.225 0.022)
  Marker R_ILIAC: pelvis (0.00953047 0.0180816 0.128464)
  Marker L_ILIAC: pelvis (0.00953047 0.0180816 -0.128464)
  Marker R_THIGH_2: femur_r (0.018 -0.15 0.064)
  Marker R_THIGH_3: femur_r (0.01 -0.3 0.06)
  Marker R_KNEE_LAT: femur_r (0 -0.404 0.05)
  Marker R_KNEE_MED: femur_r (0 -0.404 -0.05)
  Marker R_SHANK_2: tibia_r (-0.00166178 -0.156488 0.0492394)
  Marker R_SHANK_3: tibia_r (0.0113793 -0.295236 0.0553541)
  Marker R_ANKLE_LAT: tibia_r (-0.005 -0.3888 0.053)
  Marker R_ANKLE_MED: tibia_r (0.006 -0.3888 -0.038)
  Marker R_HEEL: calcn_r (-0.025 0.02 -0.005)
  Marker R_FOOT_MED: calcn_r (0.205 0.0297308 -0.03)
  Marker R_FOOT_LAT: calcn_r (0.145 0.02491 0.059)
  Marker L_THIGH_1: femur_l (0.018 -0.15 -0.064)
  Marker L_THIGH_4: femur_l (0.01 -0.3 -0.06)
  Marker L_KNEE_LAT: femur_l (0 -0.404 -0.05)
  Marker L_KNEE_MED: femur_l (0 -0.404 0.05)
  Marker L_SHANK_1: tibia_l (-0.00166178 -0.156488 -0.0492394)
  Marker L_SHANK_4: tibia_l (0.0113793 -0.295236 -0.0553541)
  Marker L_ANKLE_LAT: tibia_l (-0.005 -0.3888 -0.053)
  Marker L_ANKLE_MED: tibia_l (0.006 -0.3888 0.038)
  Marker L_HEEL: calcn_l (-0.025 0.02 0.005)
  Marker L_FOOT_MED: calcn_l (0.205 0.02973 0.03)
  Marker L_FOOT_LAT: calcn_l (0.145 0.024909 -0.059)
