# OpenSim document version 20302
ScaleTool subject01:
  mass: 72.6 [kg]
  height: 1803.4
  age: 99
  notes: This is an example setup file for scale.exe.
  GenericModelMaker:
    model_file: gait2354_simbody.osim
    marker_set_file: gait2354_Scale_MarkerSet.xml
  ModelScaler:
    apply: true
    scaling_order: measurements manualScale
    marker_file: subject01_static.trc
    time_range: 0 0.404
    preserve_mass_distribution: true
    output_model_file: subject01_scaledOnly.osim
  MarkerPlacer:
    apply: true
    marker_file: subject01_static.trc
    time_range: 0 0.404
    output_motion_file: subject01_static_output.mot
    output_model_file: subject01_simbody.osim
    max_marker_movement: -1
    IKTaskSet gait2354_Scale:
      IKMarkerTask C7: apply=true weight=1
      IKMarkerTask R_ACROMION: apply=true weight=1
      IKMarkerTask L_ACROMION: apply=true weight=1
      IKMarkerTask R_HUM_PROX: apply=true weight=1
      IKMarkerTask R_HUM_ANT: apply=true weight=1
      IKMarkerTask R_ELBOW_LAT: apply=true weight=1
      IKMarkerTask R_ELBOW_MED: apply=true weight=1
      IKMarkerTask R_WIRST_LAT: apply=true weight=1
      IKMarkerTask R_WRITS_MED: apply=true weight=1
      IKMarkerTask L_HUM_PROX: apply=true weight=1
      IKMarkerTask L_HUM_ANT: apply=true weight=1
      IKMarkerTask L_ELBOW_LAT: apply=true weight=1
      IKMarkerTask L_ELBOW_MED: apply=true weight=1
      IKMarkerTask L_WRIST_LAT: apply=true weight=1
      IKMarkerTask L_WIRST_MED: apply=true weight=1
      IKMarkerTask R_ILIAC: apply=true weight=1
      IKMarkerTask L_ILIAC: apply=true weight=1
      IKMarkerTask R_THIGH_2: apply=true weight=1
      IKMarkerTask R_THIGH_3: apply=true weight=1
      IKMarkerTask R_KNEE_LAT: apply=true weight=1
      IKMarkerTask R_KNEE_MED: apply=true weight=1
      IKMarkerTask R_SHANK_2: apply=true weight=1
      IKMarkerTask R_SHANK_3: apply=true weight=1
      IKMarkerTask R_ANKLE_LAT: apply=true weight=1
      IKMarkerTask R_ANKLE_MED: apply=true weight=1
      IKMarkerTask R_HEEL: apply=true weight=1
      IKMarkerTask R_FOOT_MED: apply=true weight=1
      IKMarkerTask R_FOOT_LAT: apply=true weight=1
      IKMarkerTask L_THIGH_1: apply=true weight=1
      IKMarkerTask L_THIGH_4: apply=true weight=1
      IKMarkerTask L_KNEE_LAT: apply=true weight=1
      IKMarkerTask L_KNEE_MED: apply=true weight=1
      IKMarkerTask L_SHANK_1: apply=true weight=1
      IKMarkerTask L_SHANK_4: apply=true weight=1
      IKMarkerTask L_ANKLE_LAT: apply=true weight=1
      IKMarkerTask L_ANKLE_MED: apply=true weight=1
      IKMarkerTask L_HEEL: apply=true weight=1
      IKMarkerTask L_FOOT_MED: apply=true weight=1
      IKMarkerTask L_FOOT_LAT: apply=true weight=1
