# OpenSim document version 30000
InverseKinematicsTool S01_0002_IK:
  model_file: /home/nikorose/Documents/DJS-GA/C3D/Gait_rawdata_c3d/osim_files_S01/S01_model.osim
  constraint_weight: 20
  accuracy: 1e-5
  marker_file: /home/nikorose/Documents/DJS-GA/C3D/Gait_rawdata_c3d/S01_0002_Gait/S01_0002_Gait_markers.sto
  time_range: 0 1.316
  output_motion_file: /home/nikorose/Documents/DJS-GA/C3D/Gait_rawdata_c3d/S01_0002_Gait/S01_0002_IK.mot
  IKTaskSet gait2354_IK:
    IKMarkerTask C7: apply=true weight=1
    IKMarkerTask R_ACROMION: apply=true weight=1
    IKMarkerTask L_ACROMION: apply=true weight=1
    IKMarkerTask R_HUM_PROX: apply=true weight=1
    IKMarkerTask R_HUM_ANT: apply=true weight=1
    IKMarkerTask R_ELBOW_LAT: apply=true weight=1
    IKMarkerTask R_ELBOW_MED: apply=true weight=1
    IKMarkerTask R_WIRST_LAT: apply=true weight=1
    IKMarkerTask R_WRITS_MED: apply=true weight=1
    IKMarkerTask L_HUM_PROX: apply=true weight=1
    IKMarkerTask L_HUM_ANT: apply=true weight=1
    IKMarkerTask L_ELBOW_LAT: apply=true weight=1
    IKMarkerTask L_ELBOW_MED: apply=true weight=1
    IKMarkerTask L_WRIST_LAT: apply=true weight=1
    IKMarkerTask L_WIRST_MED: apply=true weight=1
    IKMarkerTask R_ILIAC: apply=true weight=1
    IKMarkerTask L_ILIAC: apply=true weight=1
    IKMarkerTask R_THIGH_2: apply=true weight=1
    IKMarkerTask R_THIGH_3: apply=true weight=1
    IKMarkerTask R_SHANK_2: apply=true weight=1
    IKMarkerTask R_SHANK_3: apply=true weight=1
    IKMarkerTask R_HEEL: apply=true weight=1
    IKMarkerTask R_FOOT_MED: apply=true weight=1
    IKMarkerTask R_FOOT_LAT: apply=true weight=1
    IKMarkerTask L_THIGH_1: apply=true weight=1
    IKMarkerTask L_THIGH_4: apply=true weight=1
    IKMarkerTask L_SHANK_1: apply=true weight=1
    IKMarkerTask L_SHANK_4: apply=true weight=1
    IKMarkerTask L_HEEL: apply=true weight=1
    IKMarkerTask L_FOOT_MED: apply=true weight=1
    IKMarkerTask L_FOOT_LAT: apply=true weight=1
